*Heading
**3D Modeling
** ----------------------------------------------------------------------- input
** PARTS
** ----------------------------------------------------------------------- node list
*Node
1, 0.0, 0.0, 0.0
2, 0.5, 0.0, 0.0
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**
** ----------------------------------------------------------------------- element list
*Element, type=C3D8R
1, 111, 101, 1, 11, 112, 102, 2, 12
2, 112, 102, 2, 12, 113, 103, 3, 13
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**
**------------------------------------------------------------------------ sets
*Nset, nset=LeftSurface
1
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*Nset, nset=RightSurface
10
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*Nset, nset=TopSurface
902
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*Nset, nset=BottomSurface
2
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*Nset, nset=FrontSurface
2
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*Nset, nset=BackSurface
92
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*Nset, nset=BotmLeftBack
91
*Nset, nset=TopLeftBack
991
*Nset, nset=BotmLeftFront
1
*Nset, nset=TopLeftFront
901
*Elset, elset=Set-PTC
365
729
*Elset, elset=Set-INT-1
274
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*Elset, elset=Set-INT-2
183
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*Elset, elset=Set-INT-3
92
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*Elset, elset=Set-INT-4
1
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** -------------------------------------------------------------------- section
** Section: Sec-MAT
*Solid Section, elset=Set-MAT, material=MAT-MATRIX
1.,
** Section: Sec-INT-1
*Solid Section, elset=Set-INT-1, material=MAT-INTERPHASE-1
1.,
** Section: Sec-INT-2
*Solid Section, elset=Set-INT-2, material=MAT-INTERPHASE-1
1.,
** Section: Sec-INT-3
*Solid Section, elset=Set-INT-3, material=MAT-INTERPHASE-1
1.,
** Section: Sec-INT-4
*Solid Section, elset=Set-INT-4, material=MAT-INTERPHASE-1
1.,
** Section: Sec-PTC
*Solid Section, elset=Set-PTC, material=MAT-PARTICLE
1.,
** --------------------------------------------------------------------- equation
** Constraint: Eqn-1
*Equation
2
TopSurface, 3, 1.
TopLeftFront, 3, -1.
** Constraint: Eqn-2
*Equation
2
BottomSurface, 3, 1.
BotmLeftFront, 3, -1.
** Constraint: Eqn-3
*Equation
2
FrontSurface, 2, 1.
BotmLeftFront, 2, -1.
** Constraint: Eqn-4
*Equation
2
BackSurface, 2, 1.
BotmLeftBack, 2, -1.
**---------------------------------------------------------------------- material
**
** MATERIALS
**
*Material, name=MAT-PARTICLE
*Density
 1.89e-21,
*Elastic
 0.02, 0.3
*Material, name=MAT-MATRIX
*Density
 8.9e-22,
*Elastic, moduli=LONG TERM
 8.64e-07, 0.499946335404
*Viscoelastic, frequency=TABULAR
0.0900495440668,	0.0,	0,	0,	2.70563403256e-06
0.081484568804,	-0.025463957116,	0,	0,	2.81704249273e-06
0.090397025869,	-0.038195871986,	0,	0,	2.91253545858e-06
0.104170872346,	-0.0601873874118,	0,	0,	3.00802842444e-06
0.0791697384053,	-0.0381959400961,	0,	0,	3.1194368846e-06
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98.9803125362,	-1995.12977519,	0,	0,	1384648004.9
*Material, name=MAT-INTERPHASE-1
*Density
 8.9e-22,
*Elastic, moduli=LONG TERM
 8.64e-07, 0.499946335404
*Viscoelastic, frequency=TABULAR
0.0900495440668,	0.0,	0,	0,	7.70955994041e-18
0.081484568804,	-0.025463957116,	0,	0,	8.6653698185e-18
0.090397025869,	-0.038195871986,	0,	0,	9.54378549812e-18
0.104170872346,	-0.0601873874118,	0,	0,	1.04785527274e-17
0.0791697384053,	-0.0381959400961,	0,	0,	1.16425421404e-17
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98.9803125362,	-1995.12977519,	0,	0,	3.09300695631e+25
*Material, name=MAT-INTERPHASE-2
*Density
 8.9e-22,
*Elastic, moduli=LONG TERM
 8.64e-07, 0.499946335404
*Viscoelastic, frequency=TABULAR
0.0900495440668,	0.0,	0,	0,	3.86747745493e-10
0.081484568804,	-0.025463957116,	0,	0,	4.1416855115e-10
0.090397025869,	-0.038195871986,	0,	0,	4.38283046434e-10
0.104170872346,	-0.0601873874118,	0,	0,	4.629555134e-10
0.0791697384053,	-0.0381959400961,	0,	0,	4.92438056375e-10
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98.9803125362,	-1995.12977519,	0,	0,	3.61031906727e+15
*Material, name=MAT-INTERPHASE-3
*Density
 8.9e-22,
*Elastic, moduli=LONG TERM
 8.64e-07, 0.499946335404
*Viscoelastic, frequency=TABULAR
0.0900495440668,	0.0,	0,	0,	1.18136482582e-07
0.081484568804,	-0.025463957116,	0,	0,	1.24281111262e-07
0.090397025869,	-0.038195871986,	0,	0,	1.29597898926e-07
0.104170872346,	-0.0601873874118,	0,	0,	1.34959613073e-07
0.0791697384053,	-0.0381959400961,	0,	0,	1.41270310794e-07
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98.9803125362,	-1995.12977519,	0,	0,	3.59585204702e+11
*Material, name=MAT-INTERPHASE-4
*Density
 8.9e-22,
*Elastic, moduli=LONG TERM
 8.64e-07, 0.499946335404
*Viscoelastic, frequency=TABULAR
0.0900495440668,	0.0,	0,	0,	7.84620999069e-07
0.081484568804,	-0.025463957116,	0,	0,	8.20231996281e-07
0.090397025869,	-0.038195871986,	0,	0,	8.50868238177e-07
0.104170872346,	-0.0601873874118,	0,	0,	8.81605108775e-07
0.0791697384053,	-0.0381959400961,	0,	0,	9.17588141055e-07
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98.9803125362,	-1995.12977519,	0,	0,	11875100437.0
** ----------------------------------------------------------------
*STEP,NAME=STEP-1,PERTURBATION
3D,TENSIONXX
*STEADY STATE DYNAMICS, DIRECT
1e-06, 1000000.0, 50, 1,
*BOUNDARY
BotmLeftFront,1,6
LeftSurface, 1, 1
RightSurface, 1, 1, 0.0225
***************************************************************************************************
**OUTPUT REQUEST
**
*RESTART,WRITE,frequency=0
**
**FIELD OUTPUT: F-OUTPUT-1
**
*Output, field, variable=PRESELECT
*element output
evol
**
**HISTORY OUTPUT: H-OUTPUT-1
**
*END STEP
